*Heading
** Job name: Job-2 Model name: moxing
** Generated by: Abaqus/CAE 2021
*Preprint, echo=NO, model=NO, history=NO, contact=NO
**
** PARTS
**
*Part, name=PART-1
*Node
      1,  0.123000003,  0.123000003,  0.150000006
      2, 0.0820000023,  0.123000003,  0.150000006
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*Element, type=DC3D8
 532,  579,  459,  439,  580,  581,  461,  438,  582
 533,  578,  579,  580,  577,  583,  581,  582,  584
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*Elset, elset=UHPC
  532,  533,  534,  535,  536,  537
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** Section: UHPC
*Solid Section, elset=UHPC, material=UHPC
,
*End Part
**
**
** ASSEMBLY
**
*Assembly, name=Assembly
**
*Instance, name=PART-1-1, part=PART-1
*End Instance
**
*Elset, elset=DRAWING2_BODY1, instance=PART-1-1
  532,  533,  534,  535,  536,  537
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*Nset, nset=Set-3, instance=PART-1-1, generate
    1,  2880,     1
*Nset, nset=Set-4, instance=PART-1-1
    1,    2,    3,    4,    5,    6
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*Nset, nset=Set-5, instance=PART-1-1
    1,    2,    3,    4,    5,    6
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*Elset, elset=_CEMIAN1_S2, internal, instance=PART-1-1
 1132, 1137, 1142, 1147, 1152, 1157
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*Elset, elset=_CEMIAN1_S3, internal, instance=PART-1-1
 1308, 1309, 1310, 1311, 1450, 1451, 1458, 1459, 1528, 1529, 1536, 1537
*Elset, elset=_CEMIAN1_S4, internal, instance=PART-1-1
 1315, 1322, 2041, 2042, 2047, 2048
*Elset, elset=_CEMIAN1_S5, internal, instance=PART-1-1
 1254, 1257, 1349, 1352, 1358, 1359
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*Elset, elset=_CEMIAN1_S6, internal, instance=PART-1-1
 1266, 1267, 1272, 1273, 1406, 1407
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*Surface, type=ELEMENT, name=CEMIAN1
_CEMIAN1_S2, S2
_CEMIAN1_S3, S3
_CEMIAN1_S4, S4
_CEMIAN1_S6, S6
_CEMIAN1_S5, S5
*Elset, elset=_CEMIAN2_S1, internal, instance=PART-1-1, generate
 948,  975,    3
*Elset, elset=_CEMIAN2_S2, internal, instance=PART-1-1
  794,  797,  800,  803,  806,  809,  812,  815,  818,  821, 1714, 1717
*Elset, elset=_CEMIAN2_S3, internal, instance=PART-1-1
 1624, 1625, 1646, 1647, 1648, 1649
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*Elset, elset=_CEMIAN2_S4, internal, instance=PART-1-1
 2133, 2134, 2135, 2136, 2287, 2288, 2303, 2304, 2507, 2508, 2509, 2510
*Elset, elset=_CEMIAN2_S5, internal, instance=PART-1-1
 1179, 1180, 1743, 1744, 2365, 2366, 2367, 2368, 2421, 2422, 2429, 2430
*Elset, elset=_CEMIAN2_S6, internal, instance=PART-1-1
 1628, 1629, 1632, 1633, 2125, 2126
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*Surface, type=ELEMENT, name=CEMIAN2
_CEMIAN2_S1, S1
_CEMIAN2_S2, S2
_CEMIAN2_S4, S4
_CEMIAN2_S6, S6
_CEMIAN2_S3, S3
_CEMIAN2_S5, S5
*Elset, elset=_CEMIAN3_S2, internal, instance=PART-1-1
 574, 577, 908, 911, 914, 917
*Elset, elset=_CEMIAN3_S3, internal, instance=PART-1-1
 1554, 1555, 1580, 1581, 1584, 1585
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*Elset, elset=_CEMIAN3_S4, internal, instance=PART-1-1
 1470, 1471, 1476, 1477, 1480, 1481
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*Elset, elset=_CEMIAN3_S5, internal, instance=PART-1-1
  630,  631,  636,  637,  651,  653
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*Elset, elset=_CEMIAN3_S6, internal, instance=PART-1-1
  924,  925,  926,  927, 1496, 1497, 2443, 2444, 2447, 2448, 2708, 2711, 2721, 2722, 2723, 2724
*Surface, type=ELEMENT, name=CEMIAN3
_CEMIAN3_S2, S2
_CEMIAN3_S3, S3
_CEMIAN3_S4, S4
_CEMIAN3_S6, S6
_CEMIAN3_S5, S5
*Elset, elset=_CEMIAN4_S1, internal, instance=PART-1-1, generate
 826,  841,    5
*Elset, elset=_CEMIAN4_S2, internal, instance=PART-1-1
 538, 543
*Elset, elset=_CEMIAN4_S3, internal, instance=PART-1-1
  594,  595,  596,  597,  752,  753
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*Elset, elset=_CEMIAN4_S4, internal, instance=PART-1-1
  780,  781,  790,  791, 1026, 1027
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*Elset, elset=_CEMIAN4_S5, internal, instance=PART-1-1
  578,  580,  608,  609,  616,  617
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*Elset, elset=_CEMIAN4_S6, internal, instance=PART-1-1
  674,  675,  682,  683,  988,  989,  996,  997, 1058, 1059, 1120, 1126
*Surface, type=ELEMENT, name=CEMIAN4
_CEMIAN4_S1, S1
_CEMIAN4_S2, S2
_CEMIAN4_S4, S4
_CEMIAN4_S6, S6
_CEMIAN4_S3, S3
_CEMIAN4_S5, S5
*Elset, elset=_DIMIAN_S1, internal, instance=PART-1-1, generate
 1787,  1797,     2
*Elset, elset=_DIMIAN_S2, internal, instance=PART-1-1
 1549, 1551, 1553, 1555, 1557, 1559
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*Elset, elset=_DIMIAN_S3, internal, instance=PART-1-1
  982,  983,  988,  989, 1022, 1023
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*Elset, elset=_DIMIAN_S4, internal, instance=PART-1-1
  957,  958,  959,  960,  961,  962
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*Elset, elset=_DIMIAN_S5, internal, instance=PART-1-1
  990,  991,  992,  993,  994,  995
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*Elset, elset=_DIMIAN_S6, internal, instance=PART-1-1
  951,  952,  953,  969,  970,  971
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*Surface, type=ELEMENT, name=DIMIAN
_DIMIAN_S1, S1
_DIMIAN_S2, S2
_DIMIAN_S4, S4
_DIMIAN_S6, S6
_DIMIAN_S3, S3
_DIMIAN_S5, S5
*Elset, elset=_DINGMIAN_S1, internal, instance=PART-1-1
  588,  590,  592,  594,  596,  598
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*Elset, elset=_DINGMIAN_S2, internal, instance=PART-1-1
 2234, 2236, 2238, 2240, 2242, 2244
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*Elset, elset=_DINGMIAN_S3, internal, instance=PART-1-1
  553,  564,  565,  672,  673,  674
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*Elset, elset=_DINGMIAN_S4, internal, instance=PART-1-1
  532,  555,  570,  571,  608,  609
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*Elset, elset=_DINGMIAN_S5, internal, instance=PART-1-1
  534,  535,  536,  537,  538,  544
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*Elset, elset=_DINGMIAN_S6, internal, instance=PART-1-1
  550,  551,  562,  563,  579,  580
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*Surface, type=ELEMENT, name=DINGMIAN
_DINGMIAN_S1, S1
_DINGMIAN_S2, S2
_DINGMIAN_S4, S4
_DINGMIAN_S6, S6
_DINGMIAN_S3, S3
_DINGMIAN_S5, S5
*End Assembly
*Amplitude, name=Curing, time=TOTAL TIME
             0.,             16.,             50.,             16.,             60.,             90.,            110.,             90.
           120.,             16.,            180.,             16.
**
** MATERIALS
**
*Material, name=UHPC
*Conductivity
9600.,
*Density
2400.,
*Depvar
     20,
*Heat Generation
*Specific Heat
950.,
**
** PREDEFINED FIELDS
**
** Name: UHPCtemp   Type: Temperature
*Initial Conditions, type=TEMPERATURE
Set-3, 31.
** ----------------------------------------------------------------
**
** STEP: Step-1
**
*Step, name=Step-1, nlgeom=NO, inc=10000
*Heat Transfer, end=PERIOD, deltmx=80.
0.01, 50., 1e-05, 0.5,
**
** LOADS
**
** Name: Load-1   Type: Surface heat flux
*Dsflux
DINGMIAN, SNU, 1.
** Name: Load-2   Type: Surface heat flux
*Dsflux
CEMIAN1, SNU, 1.
** Name: Load-3   Type: Surface heat flux
*Dsflux
CEMIAN2, SNU, 1.
** Name: Load-4   Type: Surface heat flux
*Dsflux
CEMIAN3, SNU, 1.
** Name: Load-5   Type: Surface heat flux
*Dsflux
CEMIAN4, SNU, 1.
** Name: Load-6   Type: Surface heat flux
*Dsflux
DIMIAN, SNU, 1.
**
** INTERACTIONS
**
** Interaction: Int-1
*Sfilm
DINGMIAN, FNU, 1., 1.
** Interaction: Int-2
*Sfilm
CEMIAN3, FNU, 1., 1.
** Interaction: Int-3
*Sfilm
CEMIAN2, FNU, 1., 1.
** Interaction: Int-4
*Sfilm
CEMIAN4, FNU, 1., 1.
** Interaction: Int-5
*Sfilm
CEMIAN1, FNU, 1., 1.
** Interaction: Int-6
*Sfilm
DIMIAN, FNU, 1., 1.
**
** OUTPUT REQUESTS
**
*Restart, write, frequency=0
**
** FIELD OUTPUT: F-Output-1
**
*Output, field
*Node Output
NT, RFL
*Element Output, directions=YES
HFL, SDV
*Output, history, frequency=0
*End Step
** ----------------------------------------------------------------
**
** STEP: Step-2
**
*Step, name=Step-2, nlgeom=NO, inc=10000
*Heat Transfer, end=PERIOD, deltmx=80.
0.01, 60., 1e-05, 0.5,
**
** BOUNDARY CONDITIONS
**
** Name: BC-1 Type: Temperature
*Boundary, amplitude=Curing
Set-5, 11, 11, 1.
**
** OUTPUT REQUESTS
**
*Restart, write, frequency=0
**
** FIELD OUTPUT: F-Output-1
**
*Output, field
*Node Output
NT, RFL
*Element Output, directions=YES
HFL, SDV
*Output, history, frequency=0
*End Step
** ----------------------------------------------------------------
**
** STEP: Step-3
**
*Step, name=Step-3, nlgeom=NO, inc=10000
*Heat Transfer, end=PERIOD, deltmx=80.
0.01, 10., 1e-05, 0.5,
**
** BOUNDARY CONDITIONS
**
** Name: BC-1 Type: Temperature
*Boundary, op=NEW
**
** OUTPUT REQUESTS
**
*Restart, write, frequency=0
**
** FIELD OUTPUT: F-Output-1
**
*Output, field
*Node Output
NT, RFL
*Element Output, directions=YES
HFL, SDV
*Output, history, frequency=0
*End Step
** ----------------------------------------------------------------
**
** STEP: Step-4
**
*Step, name=Step-4, nlgeom=NO, inc=10000
*Heat Transfer, end=PERIOD, deltmx=80.
0.01, 60., 1e-05, 0.5,
**
** OUTPUT REQUESTS
**
*Restart, write, frequency=0
**
** FIELD OUTPUT: F-Output-1
**
*Output, field
*Node Output
NT, RFL
*Element Output, directions=YES
HFL, SDV
*Output, history, frequency=0
*End Step
